# OpenSim document version 40000
InverseKinematicsTool:
  time_range: 2.6867 3.6067
  output_motion_file: C:\Users\Hans\Documents\UNI_WIEN\KranzlCooperation\AndreasTorsionData\OpenSim\PA04\IK_PA04_w7.mot
  marker_file: ../../3DGA/P04/pre/Dynamic07/marker_experimental.trc
  IKTaskSet:
    IKMarkerTask C7: apply=true weight=1
    IKMarkerTask T10: apply=true weight=1
    IKMarkerTask STRN: apply=true weight=1
    IKMarkerTask CLAV: apply=true weight=1
    IKMarkerTask RASI: apply=true weight=1
    IKMarkerTask LASI: apply=true weight=1
    IKMarkerTask SACR: apply=true weight=1
    IKMarkerTask RT1: apply=true weight=1
    IKMarkerTask RT2: apply=true weight=1
    IKMarkerTask RT3: apply=true weight=1
    IKMarkerTask RKNE: apply=false weight=1
    IKMarkerTask RS1: apply=true weight=1
    IKMarkerTask RS2: apply=true weight=1
    IKMarkerTask RS3: apply=true weight=1
    IKMarkerTask RANK: apply=false weight=1
    IKMarkerTask RTOE: apply=true weight=1
    IKMarkerTask RHEE: apply=true weight=1
    IKMarkerTask LT1: apply=true weight=1
    IKMarkerTask LT2: apply=true weight=1
    IKMarkerTask LT3: apply=true weight=1
    IKMarkerTask LKNE: apply=false weight=1
    IKMarkerTask LANK: apply=false weight=1
    IKMarkerTask LS1: apply=true weight=1
    IKMarkerTask LS2: apply=true weight=1
    IKMarkerTask LS3: apply=true weight=1
    IKMarkerTask LTOE: apply=true weight=1
    IKMarkerTask LHEE: apply=true weight=1
