# OpenSim document version 40000
InverseKinematicsTool:
  time_range: 0.05 1.01
  output_motion_file: C:\Users\Hans\Documents\UNI_WIEN\KranzlCooperation\HansGriffithData_TD\OpenSim\TD01\IK_W_12.mot
  marker_file: C:/Users/Hans/Documents/UNI_WIEN/KranzlCooperation/HansGriffithData_TD/OpenSim/TD01/../../3DGA/TD01/3DGAIT_A_W1/marker_experimental.trc
  IKTaskSet:
    IKMarkerTask C7: apply=true weight=1
    IKMarkerTask CLAV: apply=true weight=1
    IKMarkerTask RASI: apply=true weight=1
    IKMarkerTask LASI: apply=true weight=1
    IKMarkerTask RPSI: apply=true weight=1
    IKMarkerTask LPSI: apply=true weight=1
    IKMarkerTask RKNE: apply=false weight=1
    IKMarkerTask RKNEM: apply=false weight=1
    IKMarkerTask RANK: apply=false weight=1
    IKMarkerTask RANKM: apply=false weight=1
    IKMarkerTask RHEEL: apply=true weight=1
    IKMarkerTask RTOE: apply=true weight=1
    IKMarkerTask LKNE: apply=false weight=1
    IKMarkerTask LKNEM: apply=false weight=1
    IKMarkerTask LANK: apply=false weight=1
    IKMarkerTask LANKM: apply=false weight=1
    IKMarkerTask LHEEL: apply=true weight=1
    IKMarkerTask LTOE: apply=true weight=1
    IKMarkerTask T10: apply=true weight=1
    IKMarkerTask STRN: apply=false weight=1
    IKMarkerTask RTHI1: apply=true weight=1
    IKMarkerTask RTHI2: apply=true weight=1
    IKMarkerTask RTHI3: apply=true weight=1
    IKMarkerTask RTIB1: apply=true weight=1
    IKMarkerTask RTIB2: apply=true weight=1
    IKMarkerTask RTIB3: apply=true weight=1
    IKMarkerTask LTHI1: apply=true weight=1
    IKMarkerTask LTHI2: apply=true weight=1
    IKMarkerTask LTHI3: apply=true weight=1
    IKMarkerTask LTIB1: apply=true weight=1
    IKMarkerTask LTIB2: apply=true weight=1
    IKMarkerTask LTIB3: apply=true weight=1
    IKMarkerTask RBAK: apply=false weight=1
    IKMarkerTask RM5: apply=true weight=1
    IKMarkerTask LM5: apply=true weight=1
