# OpenSim document version 40000
InverseKinematicsTool:
  time_range: 0.12 1.23
  output_motion_file: C:\Users\Hans\Documents\UNI_WIEN\KranzlCooperation\HansGriffithData_TD\OpenSim\TD03\TD03_W4_IK.mot
  marker_file: C:/Users/Hans/Documents/UNI_WIEN/KranzlCooperation/HansGriffithData_TD/OpenSim/TD03/../../3DGA/TD03/3DGAIT_B_W4/marker_experimental.trc
  IKTaskSet:
    IKMarkerTask C7: apply=true weight=1
    IKMarkerTask CLAV: apply=true weight=1
    IKMarkerTask RASI: apply=true weight=1
    IKMarkerTask LASI: apply=true weight=1
    IKMarkerTask RPSI: apply=true weight=1
    IKMarkerTask LPSI: apply=true weight=1
    IKMarkerTask RKNE: apply=false weight=1
    IKMarkerTask RANK: apply=false weight=1
    IKMarkerTask RHEE: apply=true weight=1
    IKMarkerTask RTOE: apply=true weight=1
    IKMarkerTask LKNE: apply=false weight=1
    IKMarkerTask LANK: apply=false weight=1
    IKMarkerTask LHEE: apply=true weight=1
    IKMarkerTask LTOE: apply=true weight=1
    IKMarkerTask T10: apply=true weight=1
    IKMarkerTask STRN: apply=true weight=1
    IKMarkerTask RTH1: apply=true weight=1
    IKMarkerTask RTH2: apply=true weight=1
    IKMarkerTask RTH3: apply=true weight=1
    IKMarkerTask RTB1: apply=true weight=1
    IKMarkerTask RTB2: apply=true weight=1
    IKMarkerTask RTB3: apply=true weight=1
    IKMarkerTask LTH1: apply=true weight=1
    IKMarkerTask LTH2: apply=true weight=1
    IKMarkerTask LTH3: apply=true weight=1
    IKMarkerTask LTB1: apply=true weight=1
    IKMarkerTask LTB2: apply=true weight=1
    IKMarkerTask LTB3: apply=true weight=1
    IKMarkerTask RBAK: apply=false weight=1
    IKMarkerTask RD5M: apply=true weight=1
    IKMarkerTask LD5M: apply=true weight=1
